*Heading
** Job name: dicing_4HSiC_d080_bw23 Model name: dicing_4HSiC_d080_bw23
** Generated by: Abaqus/CAE 2024
*Preprint, echo=NO, model=NO, history=NO, contact=NO
**
** PARTS
**
*Part, name=Blade
*Node
      1, 1.15000003e-05,           0.
      2, 8.05000036e-06, -3.44999989e-06
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*Element, type=R2D2
1, 1, 5
2, 5, 2
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*Node
     14,           0.,           0.,           0.
*Nset, nset=Blade-RefPt_, internal
14,
*Elset, elset=Blade, generate
  1,  12,   1
*End Part
**
*Part, name=Wafer
*Node
      1, 0.000319000013,           0.
      2, 0.000319000013, 0.000449999992
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*Element, type=CPE4R
    1,     1,     9,  1129,   592
    2,     9,    10,  1130,  1129
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*Nset, nset=WaferAll, generate
     1,  26216,      1
*Elset, elset=WaferAll, generate
     1,  25875,      1
** Section: WaferSec
*Solid Section, elset=WaferAll, controls=EC-1, material=M_4H_SiC
1.,
*End Part
**
**
** ASSEMBLY
**
*Assembly, name=Assembly
**
*Instance, name=Wafer-1, part=Wafer
*End Instance
**
*Instance, name=Blade-1, part=Blade
     2.5e-04,   0.00045545,           0.
*End Instance
**
*Nset, nset=_PickedSet6, internal, instance=Wafer-1
   1,   4, 525, 526, 527, 528
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*Elset, elset=_PickedSet6, internal, instance=Wafer-1, generate
     1,  15301,    225
*Nset, nset=_PickedSet7, internal, instance=Wafer-1
   5,   6, 615, 616, 617, 618
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*Elset, elset=_PickedSet7, internal, instance=Wafer-1, generate
 20476,  20700,      1
*Nset, nset=_PickedSet8, internal, instance=Wafer-1
    7,    8,  883,  884,  885,  886
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*Elset, elset=_PickedSet8, internal, instance=Wafer-1, generate
 25651,  25875,      1
*Nset, nset=_PickedSet9, internal, instance=Blade-1
 14,
*Nset, nset=_PickedSet10, internal, instance=Blade-1
 14,
*Nset, nset=_PickedSet13, internal, instance=Blade-1
 14,
*Elset, elset=_BladeSurf_SPOS, internal, instance=Blade-1, generate
  1,  12,   1
*Surface, type=ELEMENT, name=BladeSurf
_BladeSurf_SPOS, SPOS
*Elset, elset=_WaferTop_S2, internal, instance=Wafer-1, generate
   225,  15525,    225
*Surface, type=ELEMENT, name=WaferTop
_WaferTop_S2, S2
*Rigid Body, ref node=Blade-1.Blade-RefPt_, elset=Blade-1.Blade
*End Assembly
**
** ELEMENT CONTROLS
**
*Section Controls, name=EC-1, DISTORTION CONTROL=YES, hourglass=ENHANCED
1., 1., 1.
**
** MATERIALS
**
*Material, name=M_4H_SiC
*Damage Initiation, criterion=DUCTILE
  2.5000e-01, -2., 0.
  7.5000e-02, -1., 0.
  2.5000e-02, -0.333333, 0.
  1.0000e-02, 0., 0.
  5.0000e-03, 0.333333, 0.
  2.5000e-03, 0.666667, 0.
  1.2500e-03, 1., 0.
*Damage Evolution, type=ENERGY
 17.5,
*Density
3210.,
*Drucker Prager
 68.8,1.,0.
*Drucker Prager Hardening, type=SHEAR
 1e+09,0.
*Elastic
 4.48e+11, 0.21
**
** INTERACTION PROPERTIES
**
*Surface Interaction, name=FricContact
*Friction
 0.3,
*Surface Behavior, pressure-overclosure=HARD
**
** BOUNDARY CONDITIONS
**
** Name: BladeRot Type: Displacement/Rotation
*Boundary
_PickedSet9, 6, 6
** Name: WaferBottom Type: Symmetry/Antisymmetry/Encastre
*Boundary
_PickedSet6, ENCASTRE
** Name: WaferLeft Type: Displacement/Rotation
*Boundary
_PickedSet7, 1, 1
** Name: WaferRight Type: Displacement/Rotation
*Boundary
_PickedSet8, 1, 1
** ----------------------------------------------------------------
**
** STEP: Plunge
**
**
** AMPLITUDE
**
*Amplitude, name=BladeRamp, definition=SMOOTH STEP
0., 0., 1.64e-05, 1.
*Step, name=Plunge, nlgeom=YES
*Dynamic, Explicit
, 0.000164
*Bulk Viscosity
0.06, 1.2
** Mass Scaling: Semi-Automatic
**               Whole Model
*Fixed Mass Scaling, dt=1.00e-09, type=BELOW MIN
**
** BOUNDARY CONDITIONS
**
** Name: BladeMotion Type: Velocity/Angular velocity
*Boundary, type=VELOCITY
_PickedSet10, 1, 1
*Boundary, type=VELOCITY, AMPLITUDE=BladeRamp
_PickedSet10, 2, 2, -0.5
**
** INTERACTIONS
**
** Interaction: BladeCut
*Contact Pair, interaction=FricContact, mechanical constraint=PENALTY, cpset=BladeCut
BladeSurf, WaferTop
**
** OUTPUT REQUESTS
**
*Restart, write, number interval=1, time marks=NO
**
** FIELD OUTPUT: F-Output-1
**
*Output, field, time interval=1.928e-05
*Node Output
U,
*Element Output, directions=YES
ENER, PEEQ, S, SDV, STATUS
**
** HISTORY OUTPUT: H-Output-1
**
*Output, history, variable=PRESELECT
**
** HISTORY OUTPUT: BladeForce
**
*Output, history, time interval=5.46667e-07
*Node Output, nset=_PickedSet13
RF1, RF2, U1, U2
*End Step
** ----------------------------------------------------------------
**
** STEP: Feed
**
*Step, name=Feed, nlgeom=YES
*Dynamic, Explicit
, 0.0008
*Bulk Viscosity
0.06, 1.2
** Mass Scaling: Semi-Automatic
**               Whole Model
*Fixed Mass Scaling, dt=1.00e-09, type=BELOW MIN
**
** BOUNDARY CONDITIONS
**
** Name: BladeMotion Type: Velocity/Angular velocity
*Boundary, type=VELOCITY
_PickedSet10, 1, 1, 0.5
_PickedSet10, 2, 2
**
** OUTPUT REQUESTS
**
*Restart, write, number interval=1, time marks=NO
**
** FIELD OUTPUT: F-Output-1
**
*Output, field, time interval=1.928e-05
*Node Output
U,
*Element Output, directions=YES
ENER, PEEQ, S, SDV, STATUS
**
** HISTORY OUTPUT: H-Output-1
**
*Output, history, variable=PRESELECT
**
** HISTORY OUTPUT: BladeForce
**
*Output, history, time interval=2.66667e-06
*Node Output, nset=_PickedSet13
RF1, RF2, U1, U2
*End Step
