*Heading
** Job name: dicing_4HSiC_d290_bw23 Model name: dicing_4HSiC_d290_bw23
** Generated by: Abaqus/CAE 2024
*Preprint, echo=NO, model=NO, history=NO, contact=NO
**
** PARTS
**
*Part, name=Blade
*Node
      1, -1.15000003e-05, 0.000115000003
      2, -1.15000003e-05, 0.000106785716
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*Element, type=CPE4R
  1,   1,   2,  17,  16
  2,   2,   3,  18,  17
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*Nset, nset=BladeAll, generate
   1,  195,    1
*Elset, elset=BladeAll, generate
   1,  168,    1
** Section: BladeSec
*Solid Section, elset=BladeAll, controls=EC-1, material=Resin_bond_blade
1.,
*End Part
**
*Part, name=Wafer
*Node
      1, 0.000319000013,           0.
      2, 0.000319000013, 0.000449999992
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*Element, type=CPE4R
    1,     1,     9,  1129,   592
    2,     9,    10,  1130,  1129
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*Nset, nset=WaferAll, generate
     1,  26216,      1
*Elset, elset=WaferAll, generate
     1,  25875,      1
** Section: WaferSec
*Solid Section, elset=WaferAll, controls=EC-1, material=M_4H_SiC
1.,
*End Part
**
**
** ASSEMBLY
**
*Assembly, name=Assembly
**
*Instance, name=Wafer-1, part=Wafer
*End Instance
**
*Instance, name=Blade-1, part=Blade
     0.00025,   0.00045545,           0.
*End Instance
**
*Nset, nset=_PickedSet6, internal, instance=Wafer-1
   1,   4, 525, 526, 527, 528
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*Elset, elset=_PickedSet6, internal, instance=Wafer-1, generate
     1,  15301,    225
*Nset, nset=_PickedSet7, internal, instance=Wafer-1
   5,   6, 615, 616, 617, 618
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*Elset, elset=_PickedSet7, internal, instance=Wafer-1, generate
 20476,  20700,      1
*Nset, nset=_PickedSet8, internal, instance=Wafer-1
    7,    8,  883,  884,  885,  886
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*Elset, elset=_PickedSet8, internal, instance=Wafer-1, generate
 25651,  25875,      1
*Nset, nset=_PickedSet9, internal, instance=Blade-1, generate
   1,  181,   15
*Elset, elset=_PickedSet9, internal, instance=Blade-1, generate
   1,  155,   14
*Nset, nset=_PickedSet10, internal, instance=Blade-1, generate
   1,  181,   15
*Elset, elset=_PickedSet10, internal, instance=Blade-1, generate
   1,  155,   14
*Nset, nset=_PickedSet13, internal, instance=Blade-1, generate
   1,  181,   15
*Elset, elset=_PickedSet13, internal, instance=Blade-1, generate
   1,  155,   14
*Elset, elset=_BladeSurf_S2, internal, instance=Blade-1, generate
  42,  140,   14
*Surface, type=ELEMENT, name=BladeSurf
_BladeSurf_S2, S2
*Elset, elset=_WaferTop_S2, internal, instance=Wafer-1, generate
   225,  20700,    225
*Elset, elset=_WaferTop_S4, internal, instance=Wafer-1, generate
 20701,  25651,    225
*Surface, type=ELEMENT, name=WaferTop
_WaferTop_S2, S2
_WaferTop_S4, S4
*End Assembly
**
** ELEMENT CONTROLS
**
*Section Controls, name=EC-1, DISTORTION CONTROL=YES, hourglass=ENHANCED
1., 1., 1.
**
** MATERIALS
**
*Material, name=M_4H_SiC
*Damage Initiation, criterion=DUCTILE
    0.25,       -2.,        0.
   0.075,       -1.,        0.
   0.025, -0.333333,        0.
    0.01,        0.,        0.
   0.005,  0.333333,        0.
  0.0025,  0.666667,        0.
 0.00125,        1.,        0.
*Damage Evolution, type=ENERGY, max degradation=0.99
 17.5,
*Density
3210.,
*Drucker Prager
 68.8,1.,0.
*Drucker Prager Hardening, type=SHEAR
 1e+09,0.
*Elastic
 4.48e+11, 0.21
*Material, name=Resin_bond_blade
*Density
3500.,
*Elastic
 6e+10, 0.25
**
** INTERACTION PROPERTIES
**
*Surface Interaction, name=FricContact
*Friction
 0.3,
*Surface Behavior, pressure-overclosure=HARD
**
** BOUNDARY CONDITIONS
**
** Name: BladeLateral Type: Displacement/Rotation
*Boundary
_PickedSet9, 1, 1
** Name: WaferBottom Type: Symmetry/Antisymmetry/Encastre
*Boundary
_PickedSet6, ENCASTRE
** Name: WaferLeft Type: Displacement/Rotation
*Boundary
_PickedSet7, 1, 1
** Name: WaferRight Type: Displacement/Rotation
*Boundary
_PickedSet8, 1, 1
** ----------------------------------------------------------------
**
** STEP: Plunge
**
**
** AMPLITUDE
**
*Amplitude, name=BladeRamp, definition=SMOOTH STEP
0., 0., 5.8400e-05, 1.
*Step, name=Plunge, nlgeom=YES
*Dynamic, Explicit
, 0.000584
*Bulk Viscosity
0.12, 1.2
** Mass Scaling: Semi-Automatic
**               Whole Model
*Fixed Mass Scaling, dt=1.00e-08, type=BELOW MIN
**
** BOUNDARY CONDITIONS
**
** Name: BladeMotion Type: Velocity/Angular velocity
*Boundary, type=VELOCITY
_PickedSet10, 1, 1
*Boundary, type=VELOCITY, AMPLITUDE=BladeRamp
_PickedSet10, 2, 2, -0.5
**
** INTERACTIONS
**
** Interaction: BladeCut
*Contact Pair, interaction=FricContact, mechanical constraint=PENALTY, cpset=BladeCut
WaferTop, BladeSurf
**
** OUTPUT REQUESTS
**
*Restart, write, number interval=1, time marks=NO
**
** FIELD OUTPUT: F-Output-1
**
*Output, field, time interval=2.768e-05
*Node Output
U,
*Element Output, directions=YES
ENER, PEEQ, S, SDV, STATUS
**
** HISTORY OUTPUT: H-Output-1
**
*Output, history, variable=PRESELECT
**
** HISTORY OUTPUT: BladeForce
**
*Output, history, time interval=1.94667e-06
*Node Output, nset=_PickedSet13
RF1, RF2, U1, U2
*End Step
** ----------------------------------------------------------------
**
** STEP: Feed
**
*Step, name=Feed, nlgeom=YES
*Dynamic, Explicit
, 0.0008
*Bulk Viscosity
0.12, 1.2
** Mass Scaling: Semi-Automatic
**               Whole Model
*Fixed Mass Scaling, dt=1.00e-08, type=BELOW MIN
**
** BOUNDARY CONDITIONS
**
** Name: BladeMotion Type: Velocity/Angular velocity
*Boundary, type=VELOCITY
_PickedSet10, 1, 1, 0.5
_PickedSet10, 2, 2
**
** OUTPUT REQUESTS
**
*Restart, write, number interval=1, time marks=NO
**
** FIELD OUTPUT: F-Output-1
**
*Output, field, time interval=2.768e-05
*Node Output
U,
*Element Output, directions=YES
ENER, PEEQ, S, SDV, STATUS
**
** HISTORY OUTPUT: H-Output-1
**
*Output, history, variable=PRESELECT
**
** HISTORY OUTPUT: BladeForce
**
*Output, history, time interval=2.66667e-06
*Node Output, nset=_PickedSet13
RF1, RF2, U1, U2
*End Step
